*Heading
** Job name: d Model name: Model-1
** Generated by: Abaqus/CAE 2023.HF2
*Preprint, echo=NO, model=NO, history=NO, contact=NO
**
** PARTS
**
*Part, name=Lifter
*End Part
**
**
** ASSEMBLY
**
*Assembly, name=Assembly
**
*Instance, name=Lifter-1, part=Lifter
*Node
      1,  0.804305971, 0.0709715337
      2,  0.811807871, 0.0528603271
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*Element, type=CPS3
  1, 5635, 4876, 4228
  2, 5476,  317, 3823
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*Element, type=CPS4R
 173, 1128, 1129, 1448, 1802
 174,  201,    4, 1130, 1443
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*Nset, nset=Set-1, generate
    1,  5693,     1
*Elset, elset=Set-1, generate
    1,  5564,     1
** Section: Section-1
*Solid Section, elset=Set-1, material=Material-1
,
*End Instance
**
*Nset, nset=External, instance=Lifter-1
   13,   14,   15,   16,   17,   18
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*Elset, elset=External, instance=Lifter-1
  203,  205,  280,  292,  293,  301
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*Nset, nset=Internal, instance=Lifter-1
    6,  119,  120,  121,  122,  123
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*Elset, elset=Internal, instance=Lifter-1
  241,  247,  248,  249,  250,  251
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*Nset, nset=Set-1, instance=Lifter-1
  107,  108,  109,  110,  111,  112
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*Elset, elset=Set-1, instance=Lifter-1
  657,  659,  689,  690,  700,  788
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*Nset, nset=Set-2, instance=Lifter-1
    1,    2,    3,    4,    5,    6
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*Elset, elset=Set-2, instance=Lifter-1
  173,  174,  175,  237,  239,  240
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*Nset, nset=Set-3, instance=Lifter-1
   52,   53,   54,   55,   56,   57
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*Elset, elset=Set-3, instance=Lifter-1
  449,  475,  486,  494,  504,  514
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*Elset, elset=_Surf-1_S2, internal, instance=Lifter-1
  486, 2249
*Elset, elset=_Surf-1_S4, internal, instance=Lifter-1
  494,  504,  514, 2127, 2129, 2130, 2131, 2132
*Surface, type=ELEMENT, name=Surf-1
_Surf-1_S2, S2
_Surf-1_S4, S4
*End Assembly
**
** MATERIALS
**
*Material, name=Material-1
*Elastic
 1.333, 0.333
** ----------------------------------------------------------------
**
** STEP: Step-1
**
*Step, name=Step-1, nlgeom=NO
*Static
1., 1., 1e-05, 1.
**
** BOUNDARY CONDITIONS
**
** Name: BC-1 Type: Displacement/Rotation
*Boundary
Set-1, 1, 1
Set-1, 2, 2
** Name: BC-2 Type: Displacement/Rotation
*Boundary
Set-2, 1, 1
Set-2, 2, 2
** Name: BC-3 Type: Displacement/Rotation
*Boundary
Set-3, 1, 1, 3.
Set-3, 2, 2, 3.
**
** OUTPUT REQUESTS
**
*Restart, write, frequency=0
**
** FIELD OUTPUT: F-Output-1
**
*Output, field, variable=PRESELECT
**
** HISTORY OUTPUT: H-Output-1
**
*Output, history, variable=PRESELECT
*End Step
